*Heading
** Job name: Job-1 Model name: Model-1
*Node
      1,          0.5,         -0.5,           0.
      2,          0.5,           0.,           0.
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*User element, nodes=8, type=U1, properties=11, coordinates=3, var=10000
1,2,3
1,11
*Element, type=U1, elset=solid
   1,    8,  263, 3078,  362,    1,   19,  677,  214
   2,  263,  262, 3079, 3078,   19,   20,  678,  677
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*UEL PROPERTY, ELSET=solid
1.,1.,1.,1.,210000.,0.3,0.070, 2.7,
1, 2 ,0.00001
**EASPar, EASFor, ANSShear, ANSTRAP, E, nu, Length scale, Gc,
**Fat_flag, k value for model-2, Kresidual
*Element, type=C3D8, elset=dummy
100001,     8,   263,  3078,   362,     1,    19,   677,   214
100002,   263,   262,  3079,  3078,    19,    20,   678,   677
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** connectivity of the dummy element
** Section: Section-1
*Solid Section, elset=dummy, material=Material-1
,
**
**
** ASSEMBLY
**
**
*Nset, nset=Lower
   1,   4,   7,   8,  10,  11
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*Elset, elset=Lower
    1,   51,  101,  151,  201,  251
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*Nset, nset=Upper
  13,  14,  17,  18, 549, 550
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*Elset, elset=Upper
 3291, 3314, 4149, 4152, 4158, 4170
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** Section: Section-1
*Amplitude, name=Amp-2
0,0,1,1
** MATERIALS
**
*Material, name=Material-1
*Depvar
      6,
1, ENE, ENE
2, str, str
3, Alp,Alp
4, stress, stress
5,  PF,PF
6, Ac, Ac
*User Material, constants=0
0.,
** BOUNDARY CONDITIONS
**
** Name: BC-1 Type: Displacement/Rotation
*Boundary
Lower, 1, 1
Lower, 2, 2
Lower, 3, 3
*Boundary
Upper, 2, 2
Upper, 3, 3
** ----------------------------------------------------------------
**
** STEP: Step-1
**
*Step, name=Step-1, nlgeom=YES, inc=1000000
*Static, direct
0.0001, 1
**
** BOUNDARY CONDITIONS
**
** Name: BC-2 Type: Displacement/Rotation
*Boundary, amplitude=Amp-2
Upper, 1, 1, 1
**
** OUTPUT REQUESTS
**
** CONTROLS
**
*Controls, reset
*Controls, parameters=time incrementation
1000, 1000, ,1000, 1000
*Restart, write, frequency=0
**
** FIELD OUTPUT: F-Output-1
**
*Output, field
*Node Output
NT, U, RF
*Element Output, directions=YES
SDV,
** HISTORY OUTPUT: H-Output-1
*End Step
