*Heading
** Job name: Job-1 Model name: Model-1
*Node
      1,          67.,          30.,           0.
      2,          67.,           5.,           0.
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*User element, nodes=8, type=U1, properties=11, coordinates=3, var=10000
1,2,3
1,11
*Element, type=U1, elset=solid
    1,   155,   307,    11,     1,  3088,  3240,  2944,  2934
    2,   307,   308,    12,    11,  3240,  3241,  2945,  2944
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*UEL PROPERTY, ELSET=solid
1.,1.,1.,1.,210000.,0.3,0.030, 2.7,
1, 2 ,0.00001
**EASPar, EASFor, ANSShear, ANSTRAP, E, nu, Length scale, Gc,
**Fat_flag, k value for model-2, Kresidual
*Element, type=C3D8, elset=dummy
100001,   155,   307,    11,     1,  3088,  3240,  2944,  2934
100002,   307,   308,    12,    11,  3240,  3241,  2945,  2944
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** connectivity of the dummy element
** Section: Section-1
*Solid Section, elset=dummy, material=Material-1
,
**
**
** ASSEMBLY
**
**
*Nset, nset=Set-6, generate
     1,  17598,      1
*Elset, elset=Set-6, generate
     1,  14020,      1
*Nset, nset=fixed, generate
    73,  14738,   2933
*Nset, nset=fixed2, generate
   269,  14934,   2933
*Nset, nset=load, generate
   157,  14822,   2933
*Nset, nset=loadextra
   156,   158,  3089,  3091,  6022,  6024,  8955,  8957, 11888, 11890, 14821, 14823
** Section: Section-1
** Section: Section-1
*Amplitude, name=Amp-1
*include, input=Amplitude10.txt
*Amplitude, name=Amp-2
0,0,1,1
** MATERIALS
**
*Material, name=Material-1
*Depvar
      6,
1, ENE, ENE
2, str, str
3, Alp,Alp
4, stress, stress
5,  PF,PF
6, Ac, Ac
*User Material, constants=0
0.,
** BOUNDARY CONDITIONS
**
** Name: BC-1 Type: Displacement/Rotation
*Boundary
fixed, 1, 1
fixed, 2, 2
fixed, 3, 3
*Boundary
fixed2, 2, 2
fixed2, 3, 3
** ----------------------------------------------------------------
**
** STEP: Step-1
**
*Step, name=Step-1, nlgeom=YES, inc=1000000
*Static
0.0001, 4, 1e-7, 0.0005
**
** BOUNDARY CONDITIONS
**
** Name: BC-2 Type: Displacement/Rotation
*Boundary, amplitude=Amp-1
load, 2, 2, -1
**
*Boundary, amplitude=Amp-1
loadextra, 2, 2, -1
** OUTPUT REQUESTS
**
** CONTROLS
**
*controls, reset
*Controls, parameters=time incrementation
100, 100, ,100, 100
*Restart, write, frequency=0
**
** FIELD OUTPUT: F-Output-1
**
*Output, field
*Node Output
NT, RF
*Element Output, directions=YES
SDV6
** HISTORY OUTPUT: H-Output-1
*End Step
