*Heading
** Job name: Job-1 Model name: Model-1
*Node
      1,           1.,  0.949999988, 0.0199999996
      2,          0.5,  0.949999988, 0.0199999996
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*User element, nodes=8, type=U1, properties=11, coordinates=3, var=10000
1,2,3
1,11
*Element, type=U1, elset=solid
   1,   13,   12,  354,  332, 2864, 2863, 3205, 3183
   2,  362,  444,  142,  141, 3213, 3295, 2993, 2992
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*UEL PROPERTY, ELSET=solid
1.,1.,1.,1.,210000.,0.3,0.070, 2.7,
1, 2 ,0.00001
**EASPar, EASFor, ANSShear, ANSTRAP, E, nu, Length scale, Gc,
**Fat_flag, k value for model-2, Kresidual
*Element, type=C3D8, elset=dummy
100001,    13,    12,   354,   332,  2864,  2863,  3205,  3183
100002,   362,   444,   142,   141,  3213,  3295,  2993,  2992
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** connectivity of the dummy element
** Section: Section-1
*Solid Section, elset=dummy, material=Material-1
,
**
**
** ASSEMBLY
**
**
**Elset, elset=Crack, instance=Part-1-1
 **11287,
*Nset, nset=Top
    7,    8,  167,  168,  169,  170
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*Elset, elset=Top
 1415, 1416, 1417, 1437, 1438, 1463
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*Nset, nset=Bottom
    5,    6,  100,  101,  102,  103
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*Elset, elset=Bottom
   9,  17,  18,  27,  35,  51
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*Nset, nset=Right
    1,    6,    7,  119,  120,  121
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*Elset, elset=Right
    2,    3,    5,    9,  128,  129
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*Nset, nset=leftA
    4,    5,    8,    9,   91,   92
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*Elset, elset=leftA
  118,  119,  120,  121,  123,  124
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*Nset, nset=Set-6, generate
    1,  5702,     1
*Elset, elset=Set-6, generate
    1,  2784,     1
*Amplitude, name=Amp-1
*include, input=Amplitude10.txt
** MATERIALS
**
*Material, name=Material-1
*Depvar
      6,
1, ENE, ENE
2, str, str
3, Alp,Alp
4, stress, stress
5,  PF,PF
6, Ac, Ac
*User Material, constants=0
0.,
** BOUNDARY CONDITIONS
**
** Name: BC-1 Type: Displacement/Rotation
*Boundary
Bottom, 1, 1
Bottom, 2, 2
Bottom, 3, 3
*Boundary
Top, 1, 1
Top, 3, 3
** ----------------------------------------------------------------
**
** STEP: Step-1
**
*Step, name=Step-1, nlgeom=YES, inc=1000000
*Static, direct
0.0005, 10,
**
** BOUNDARY CONDITIONS
**
** Name: BC-2 Type: Displacement/Rotation
*Boundary, amplitude=Amp-1
Top, 2, 2, 0.6
**
** OUTPUT REQUESTS
**
** CONTROLS
**
*Controls, reset
*Controls, parameters=time incrementation
1000, 1000, ,1000, 1000
*Restart, write, frequency=0
**
** FIELD OUTPUT: F-Output-1
**
*Output, field, time interval=0.0005, time marks=NO
*Node Output
NT, U, RF
*Element Output, directions=YES
SDV,
** HISTORY OUTPUT: H-Output-1
*End Step
